*Heading
** Job name: GSL42015 Model name: GSL42015
** Generated by: Abaqus/CAE 2024
*Preprint, echo=NO, model=NO, history=NO, contact=NO
**
** PARTS
**
*Part, name=Facetrack
*Node
      1,          35.,         -77.,         525.
      2,         -35.,         -77.,         525.
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*Element, type=S4R
  1,   1,  17, 353, 116
  2,  17,  18, 354, 353
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*Nset, nset=Set_Whole, generate
    1,  1860,     1
*Elset, elset=Set_Whole, generate
    1,  1769,     1
*Elset, elset=_Surf_0_SPOS, internal, generate
 1594,  1713,     1
*Surface, type=ELEMENT, name=Surf_0
_Surf_0_SPOS, SPOS
*Elset, elset=_Surf_1_SPOS, internal, generate
 1362,  1481,     1
*Surface, type=ELEMENT, name=Surf_1
_Surf_1_SPOS, SPOS
*Elset, elset=_Surf_Middle_SPOS, internal
  316,  317,  318,  319,  320,  321
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*Surface, type=ELEMENT, name=Surf_Middle
_Surf_Middle_SPOS, SPOS
** Section: Sec_Facetrack
*Shell Section, elset=Set_Whole, material=Mat_CFS_Facetrack, offset=SPOS
1.2, 7
*End Part
**
*Part, name=Floorsheathing
*Node
      1,         120.,        -550.,           0.
      2,         120.,         550.,           0.
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*Element, type=S4R
   1,    1,    9,  519,  272
   2,    9,   10,  520,  519
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*Nset, nset=Set_Whole, generate
    1,  4551,     1
*Elset, elset=Set_Whole, generate
    1,  4400,     1
*Elset, elset=_Surf_Bottom_1_SPOS, internal, generate
 2641,  3520,     1
*Surface, type=ELEMENT, name=Surf_Bottom_1
_Surf_Bottom_1_SPOS, SPOS
*Elset, elset=_Surf_Bottom_2_SPOS, internal, generate
 3521,  4400,     1
*Surface, type=ELEMENT, name=Surf_Bottom_2
_Surf_Bottom_2_SPOS, SPOS
** Section: Sec_Floorsheathing
*Shell Section, elset=Set_Whole, material=Mat_OSB, offset=SPOS
18., 7
*End Part
**
*Part, name=Gear
*Node
      1,   18.6232986,   54.2000008,          30.
      2,   19.9167309,   52.2642441,          30.
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*Element, type=S4R
 1,   1,  65, 905,  96
 2,  65,  66, 906, 905
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*Nset, nset=Set_Bottom_Edge
   3,   4,   6,   8,  10,  12
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*Elset, elset=Set_Bottom_Edge
   43,   44,   45,  130,  131,  132
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*Nset, nset=Set_Top_Edge
   1,   2,   5,   7,   9,  11
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*Elset, elset=Set_Top_Edge
    1,    2,    3,   46,   47,   48
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*Nset, nset=Set_Whole, generate
    1,  3648,     1
*Elset, elset=Set_Whole, generate
    1,  3420,     1
*Elset, elset=_Surf_Outside_SPOS, internal, generate
    1,  3420,     1
*Surface, type=ELEMENT, name=Surf_Outside
_Surf_Outside_SPOS, SPOS
** Section: Sec_Gear
*Shell Section, elset=Set_Whole, material=Mat_LMD, offset=SPOS
1.1, 7
*End Part
**
*Part, name=Joist
*Node
      1,         37.5,        -105.,        1250.
      2,         37.5,        -120.,        1250.
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*Element, type=S4R
  1,    1,   25,  973,  244
  2,   25,    2,   26,  973
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*Nset, nset=Set_Top_Edge
  13,  14,  15,  16,  17,  20
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*Elset, elset=Set_Top_Edge
 4859, 4860, 4933, 4934, 4935, 4936
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*Nset, nset=Set_Bottom_Edge
  18,  19,  21,  22,  23,  24
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*Elset, elset=Set_Bottom_Edge
 5289, 5290, 5423, 5424, 5425, 5426
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*Nset, nset=Set_Load_Edge
   1,   2,   5,   7,   9,  11
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*Elset, elset=Set_Load_Edge
    1,    2,  221,  222,  223,  224
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*Nset, nset=Set_Node_Corner_1
 18,
*Nset, nset=Set_Node_Corner_2
 23,
*Nset, nset=Set_Whole, generate
    1,  6120,     1
*Elset, elset=Set_Whole, generate
    1,  5940,     1
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*Elset, elset=_Surf_0_SPOS, internal, generate
 5431,  5790,     1
*Surface, type=ELEMENT, name=Surf_0
_Surf_0_SPOS, SPOS
*Elset, elset=_Surf_Flange_1_SPOS, internal
  221,  222,  223,  224,  225,  226
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*Surface, type=ELEMENT, name=Surf_Flange_1
_Surf_Flange_1_SPOS, SPOS
*Elset, elset=_Surf_Flange_2_SPOS, internal
 3741, 3742, 3743, 3744, 3745, 3746
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*Surface, type=ELEMENT, name=Surf_Flange_2
_Surf_Flange_2_SPOS, SPOS
*Elset, elset=_Surf_1_SNEG, internal
 3694, 3695, 3696, 3697, 3698, 3699
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*Surface, type=ELEMENT, name=Surf_1
_Surf_1_SNEG, SNEG
** Section: Sec_Joist
*Shell Section, elset=Set_Whole, material=Mat_CFS_Joist, offset=SPOS
1.25, 7
*End Part
**
*Part, name=Stud
*Node
      1,         37.5,         -60.,         820.
      2,         37.5,         -75.,         820.
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*Element, type=S4R
 1,   1,  25, 625,  72
 2,  25,   2,  26, 625
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*Nset, nset=Set_Bottom_Edge
  18,  19,  21,  22,  23,  24
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*Elset, elset=Set_Bottom_Edge
  988,  989, 1448, 1449, 1450, 1451
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*Nset, nset=Set_Top_Edge
  13,  14,  15,  16,  17,  20
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*Elset, elset=Set_Top_Edge
 841, 842, 843, 844, 845, 846
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*Nset, nset=Set_Whole, generate
    1,  3024,     1
*Elset, elset=Set_Whole, generate
    1,  2905,     1
*Elset, elset=_Surf_Middle_SPOS, internal, generate
 241,  600,    1
*Surface, type=ELEMENT, name=Surf_Middle
_Surf_Middle_SPOS, SPOS
*Elset, elset=_Surf_Flange_1_SPOS, internal, generate
  49,  240,    1
*Surface, type=ELEMENT, name=Surf_Flange_1
_Surf_Flange_1_SPOS, SPOS
*Elset, elset=_Surf_Flange_2_SPOS, internal, generate
 601,  792,    1
*Surface, type=ELEMENT, name=Surf_Flange_2
_Surf_Flange_2_SPOS, SPOS
** Section: Sec_Stud
*Shell Section, elset=Set_Whole, material=Mat_CFS_Stud, offset=SPOS
1.39, 7
*End Part
**
*Part, name=Wheel
*Node
      1,   21.3949375,   51.6519508,          30.
      2,   16.9462852,   40.9119492,          30.
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*Element, type=S4R
 1,   1,  65, 889, 102
 2,  65,  66, 890, 889
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*Nset, nset=Set_Bottom_Edge
   3,   4,   6,   8,  10,  12
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*Elset, elset=Set_Bottom_Edge
   85,   86,   87,   88,   89,   90
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*Nset, nset=Set_Top_Edge
   1,   2,   5,   7,   9,  11
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*Elset, elset=Set_Top_Edge
    1,    2,    3,    4,    5,    6
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*Nset, nset=Set_Whole, generate
    1,  3520,     1
*Elset, elset=Set_Whole, generate
    1,  3300,     1
*Elset, elset=_Surf_Inside_SNEG, internal, generate
    1,  3300,     1
*Surface, type=ELEMENT, name=Surf_Inside
_Surf_Inside_SNEG, SNEG
** Section: Sec_Wheel
*Shell Section, elset=Set_Whole, material=Mat_LMD, offset=SPOS
1.1, 7
*End Part
**
**
** ASSEMBLY
**
*Assembly, name=Assembly
**
*Instance, name=Stud_1, part=Stud
      -262.5,           0.,           0.
      -262.5,           0.,           0.,       -262.5, 0.707106790158355, 0.707106790158355,         180.
*End Instance
**
*Instance, name=Stud_2, part=Stud
       262.5,           0.,           0.
       262.5,           0.,           0., 261.499999987312,           0.,           0., 89.9999992730282
*End Instance
**
*Instance, name=Joist_1, part=Joist
      -157.5,         700.,         -75.
*End Instance
**
*Instance, name=Joist_2, part=Joist
       157.5,         700.,         -75.
       157.5,         700.,         -75.,        157.5,         700.,         -74.,         180.
*End Instance
**
*Instance, name=Facetrack_1, part=Facetrack
       -300.,         743.,        -110.
       -300.,         743.,        -110.,        -300., 744.000000012688,        -110., 89.9999992730282
*End Instance
**
*Instance, name=Wheel_1, part=Wheel
       -195.,         700.,           0.
       -195.,         700.,           0.,        -195., 698.999999987312,           0., 89.9999992730282
*End Instance
**
*Instance, name=Wheel_2, part=Wheel
        195.,         700.,           0.
        195.,         700.,           0., 195.707106790158,         700., 0.707106790158355,         180.
*End Instance
**
*Instance, name=Gear_1, part=Gear
       -225.,         700.,           0.
       -225.,         700.,           0.,        -225., 701.000000012688,           0., 89.9999992730282
*End Instance
**
*Instance, name=Gear_2, part=Gear
        225.,         700.,           0.
        225.,         700.,           0., 224.292893209842,         700., 0.707106790158355,         180.
*End Instance
**
*Instance, name=Floorsheathing_1, part=Floorsheathing
          0.,         820.,         475.
          0.,         820.,         475., -4.32978043075079e-17, 819.292893209842, 475.707106790158,         180.
*End Instance
**
*Node
      1,           0.,           0.,           0.
*Node
      2,           0.,         700.,        1175.
*Node
      3,           0.,         810.,        1175.
*Node
      4,        157.5,         820.,         975.
      5,        157.5,         820.,         725.
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*Element, type=CONN3D2
1, 3, 2
*Connector Section, elset=Wire_Swing_Link, behavior=ConnSect_Swing_Link
Axial,
Datum_csys_Swing_Link,
*Nset, nset=AttachmentPoints_Facetrack_Stud_1
 16, 17
*Nset, nset=AttachmentPoints_Facetrack_Stud_2
 14, 15
*Nset, nset=AttachmentPoints_Floorsheathing_1, generate
  9,  13,   1
*Nset, nset=AttachmentPoints_Floorsheathing_2, generate
 4,  8,  1
*Nset, nset=Joist_Top_Edge_1, instance=Joist_1
   1,   2,   5,   7,   9,  11
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*Nset, nset=Joist_Top_Edge_1, instance=Joist_2
   1,   2,   5,   7,   9,  11
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*Elset, elset=Joist_Top_Edge_1, instance=Joist_1
    1,    2,  221,  222,  223,  224
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*Elset, elset=Joist_Top_Edge_1, instance=Joist_2
    1,    2,  221,  222,  223,  224
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*Nset, nset=Set_RP_Base_1
 1,
*Nset, nset=Set_RP_Joist_End_1
 2,
*Nset, nset=Set_RP_swinglink_top
 3,
*Nset, nset=Stud_Bottom_Edge_1, instance=Stud_1
  18,  19,  21,  22,  23,  24
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*Nset, nset=Stud_Bottom_Edge_1, instance=Stud_2
  18,  19,  21,  22,  23,  24
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*Elset, elset=Stud_Bottom_Edge_1, instance=Stud_1
  988,  989, 1448, 1449, 1450, 1451
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*Elset, elset=Stud_Bottom_Edge_1, instance=Stud_2
  988,  989, 1448, 1449, 1450, 1451
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*Nset, nset=Wire_Swing_Link
 2, 3
*Elset, elset=Wire_Swing_Link
 1,
*Elset, elset=_Surf_Stud_Flanges_SPOS, internal, instance=Stud_1, generate
  49,  240,    1
*Elset, elset=_Surf_Stud_Flanges_SPOS, internal, instance=Stud_2, generate
 601,  792,    1
*Surface, type=ELEMENT, name=Surf_Stud_Flanges
_Surf_Stud_Flanges_SPOS, SPOS
*Surface, type=NODE, name=Gear_1_Set_Top_Edge_CNS_, internal
Gear_1.Set_Top_Edge, 1.
*Surface, type=NODE, name=Gear_2_Set_Top_Edge_CNS_, internal
Gear_2.Set_Top_Edge, 1.
*Surface, type=NODE, name=Wheel_1_Set_Top_Edge_CNS_, internal
Wheel_1.Set_Top_Edge, 1.
*Surface, type=NODE, name=Wheel_2_Set_Top_Edge_CNS_, internal
Wheel_2.Set_Top_Edge, 1.
*Surface, type=NODE, name=Stud_Bottom_Edge_1_CNS_, internal
Stud_Bottom_Edge_1, 1.
*Surface, type=NODE, name=Joist_Top_Edge_1_CNS_, internal
Joist_Top_Edge_1, 1.
*Surface, type=NODE, name=Gear_1_Set_Bottom_Edge_CNS_, internal
Gear_1.Set_Bottom_Edge, 1.
*Surface, type=NODE, name=Gear_2_Set_Bottom_Edge_CNS_, internal
Gear_2.Set_Bottom_Edge, 1.
*Surface, type=NODE, name=Wheel_1_Set_Bottom_Edge_CNS_, internal
Wheel_1.Set_Bottom_Edge, 1.
*Surface, type=NODE, name=Wheel_2_Set_Bottom_Edge_CNS_, internal
Wheel_2.Set_Bottom_Edge, 1.
*Orientation, name=Datum_csys_Swing_Link
          0.,           1.,           0.,          -1.,           0.,           0.
1, 0.
*Orientation, name=Datum_csys_Glob
          1.,           0.,           0.,           0.,           1.,           0.
1, 0.
*Orientation, name=Datum_csys_Floorsheathing
          1.,           0.,           0.,           0.,           0.,          -1.
1, 0.
*Orientation, name=Datum_csys_Facetrack
          1.,           0.,           0.,           0.,           1.,           0.
1, 0.
** Constraint: Coupling_Base_1
*Coupling, constraint name=Coupling_Base_1, ref node=Set_RP_Base_1, surface=Stud_Bottom_Edge_1_CNS_
*Kinematic
** Constraint: Joist_End_1
*Coupling, constraint name=Joist_End_1, ref node=Set_RP_Joist_End_1, surface=Joist_Top_Edge_1_CNS_
*Kinematic
** Constraint: Tie_Gear_1
*Tie, name=Tie_Gear_1, adjust=yes
Gear_1_Set_Bottom_Edge_CNS_, Stud_1.Surf_Middle
** Constraint: Tie_Gear_2
*Tie, name=Tie_Gear_2, adjust=yes
Gear_2_Set_Bottom_Edge_CNS_, Stud_2.Surf_Middle
** Constraint: Tie_Wheel_1
*Tie, name=Tie_Wheel_1, adjust=yes
Wheel_1_Set_Bottom_Edge_CNS_, Joist_1.Surf_0
** Constraint: Tie_Wheel_2
*Tie, name=Tie_Wheel_2, adjust=yes
Wheel_2_Set_Bottom_Edge_CNS_, Joist_2.Surf_0
**
** POINT-BASED FASTENER: Fasteners_Floorsheathing_Joist_1
*Fastener Property, name=Fasteners_Floorsheathing_Joist_1
2.4
*Connector Section, elset=_Fasteners_Floorsheathing_Joist_1_pf_, behavior=ConnSect_OSB_Joist
Radial-Thrust,
Datum_csys_Glob,
*Fastener, interaction name=Fasteners_Floorsheathing_Joist_1, property=Fasteners_Floorsheathing_Joist_1, reference node set=AttachmentPoints_Floorsheathing_1, elset=_Fasteners_Floorsheathing_Joist_1_pf_, coupling=STRUCTURAL, attachment method=FACETOFACE,
weighting method=UNIFORM, adjust orientation=NO, number of layers=1, orientation=Datum_csys_Floorsheathing

Joist_1.Surf_Flange_2, Floorsheathing_1.Surf_Bottom_2
**
** POINT-BASED FASTENER: Fasteners_Floorsheathing_Joist_2
*Fastener Property, name=Fasteners_Floorsheathing_Joist_2
2.4
*Connector Section, elset=_Fasteners_Floorsheathing_Joist_2_pf_, behavior=ConnSect_OSB_Joist
Radial-Thrust,
Datum_csys_Glob,
*Fastener, interaction name=Fasteners_Floorsheathing_Joist_2, property=Fasteners_Floorsheathing_Joist_2, reference node set=AttachmentPoints_Floorsheathing_2, elset=_Fasteners_Floorsheathing_Joist_2_pf_, coupling=STRUCTURAL, attachment method=FACETOFACE,
weighting method=UNIFORM, adjust orientation=NO, number of layers=1, orientation=Datum_csys_Floorsheathing

Joist_2.Surf_Flange_1, Floorsheathing_1.Surf_Bottom_1
**
** POINT-BASED FASTENER: Fasteners_Stud_Facetrack_1
*Fastener Property, name=Fasteners_Stud_Facetrack_1
2.7
*Connector Section, elset=_Fasteners_Stud_Facetrack_1_pf_, behavior=ConnSect_Facetrack_Stud
Radial-Thrust,
Datum_csys_Glob,
*Fastener, interaction name=Fasteners_Stud_Facetrack_1, property=Fasteners_Stud_Facetrack_1, reference node set=AttachmentPoints_Facetrack_Stud_2, elset=_Fasteners_Stud_Facetrack_1_pf_, coupling=STRUCTURAL, attachment method=FACETOFACE,
weighting method=UNIFORM, adjust orientation=NO, number of layers=1, orientation=Datum_csys_Facetrack

Stud_1.Surf_Flange_1, Facetrack_1.Surf_0
**
** POINT-BASED FASTENER: Fasteners_Stud_Facetrack_2
*Fastener Property, name=Fasteners_Stud_Facetrack_2
2.7
*Connector Section, elset=_Fasteners_Stud_Facetrack_2_pf_, behavior=ConnSect_Facetrack_Stud
Radial-Thrust,
Datum_csys_Glob,
*Fastener, interaction name=Fasteners_Stud_Facetrack_2, property=Fasteners_Stud_Facetrack_2, reference node set=AttachmentPoints_Facetrack_Stud_2, elset=_Fasteners_Stud_Facetrack_2_pf_, coupling=STRUCTURAL, attachment method=FACETOFACE,
weighting method=UNIFORM, adjust orientation=NO, number of layers=1, orientation=Datum_csys_Facetrack

Stud_2.Surf_Flange_2, Facetrack_1.Surf_1
*End Assembly
*Connector Behavior, name=ConnSect_Swing_Link
*Connector Elasticity, component=1
 195.873,
*Amplitude, name=Amp_1, definition=SMOOTH STEP
             0.,              0.,              1.,              1.
*Amplitude, name=Amp_Cyclic_Loads, definition=SMOOTH STEP
             0.,              0.,            0.25,            3.81,             0.5,              0.,            0.75,           -3.81
             1.,              0.,            1.25,            3.81,             1.5,              0.,            1.75,           -3.81
             2.,              0.,            2.25,             5.4,             2.5,              0.,            2.75,            -5.4
             3.,              0.,            3.25,             5.4,             3.5,              0.,            3.75,            -5.4
             4.,              0.,            4.25,            7.54,             4.5,              0.,            4.75,           -7.54
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            22.,              0.
**
** MATERIALS
**
*Material, name=Mat_CFS_Facetrack
*Density
 7.85e-09,
*Elastic
210000., 0.33
*Plastic, hardening=COMBINED, number backstresses=1
  165.13,         0.
  200.19,   2.79e-06
  230.25,  1.031e-05
   250.3,  2.073e-05
  275.37,  4.463e-05
  305.47, 0.00010054
 350.687, 0.00029092
 365.783, 0.00040134
 401.089, 0.00080816
 441.664, 0.00167089
 483.264, 0.00447584
 501.308,  0.0102762
 523.592,  0.0238094
 553.175,  0.0496411
    594.,  0.0924816
*Material, name=Mat_CFS_Joist
*Density
 7.85e-09,
*Elastic
206486., 0.33
*Plastic, hardening=COMBINED, number backstresses=1
 180.859,          0.
 216.513, 1.49257e-05
 250.794, 4.32228e-05
 282.796, 7.23491e-05
 310.947, 9.92667e-05
 337.464, 0.000127139
  363.68, 0.000152197
 388.874, 0.000193237
 411.313, 0.000244784
 428.084, 0.000277835
 440.332,  0.00428554
 450.629,   0.0163549
 460.569,   0.0177997
 470.063,   0.0212219
 480.869,   0.0250334
 490.266,   0.0288936
 500.037,   0.0334542
 510.624,   0.0383959
 520.303,   0.0440849
 530.149,   0.0505497
 540.413,   0.0581536
 550.797,   0.0669834
 560.093,   0.0770992
 570.054,   0.0885199
 580.015,    0.102849
 590.532,    0.119555
 600.077,    0.140471
 603.529,     0.15224
*Material, name=Mat_CFS_Stud
*Density
 7.85e-09,
*Elastic
188001., 0.33
*Plastic, hardening=COMBINED, number backstresses=1
 132.063,          0.
 168.111, 7.67942e-06
 200.596, 1.43884e-05
  229.07, 2.50399e-05
 258.817, 5.06657e-05
 286.184, 0.000112781
 306.404, 0.000166827
 327.565, 0.000235869
 344.781,  0.00033777
 360.941, 0.000461995
 374.581, 0.000623634
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 636.262,     0.16889
*Material, name=Mat_LMD
*Density
 7.85e-09,
*Elastic
143298., 0.33
*Plastic, hardening=COMBINED, number backstresses=1
 394.22,          0.
 396.03, 4.98765e-06
   400., 3.13032e-05
 405.03, 0.000152539
 410.04, 0.000615136
 415.03,  0.00209452
 420.05,   0.0045714
 430.06,  0.00990662
 440.02,   0.0154772
   450.,    0.021222
 460.05,   0.0271142
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 747.57,    0.403967
*Material, name=Mat_OSB
*Density
 6e-10,
*Elastic
3080., 0.2
*Concrete Damaged Plasticity
11.,    0.1,   1.16, 0.6667,     0.
*Concrete Compression Hardening
  8.6855,      0.
 8.81318,   5e-05
 8.93936,  0.0001
 9.18701,  0.0002
 9.42803,  0.0003
 9.66202,  0.0004
 9.88855,  0.0005
 10.1072,  0.0006
 10.5195,  0.0008
 10.8959,   0.001
 11.6636,  0.0015
 12.1625,   0.002
 12.3852,  0.0025
    12.4, 0.00267
 12.3466,   0.003
 12.0812,  0.0035
 11.6354,   0.004
 11.0598,  0.0045
 10.4026,   0.005
 9.93021, 0.00534
*Concrete Tension Stiffening
  3.4,          0.
   4., 0.000200198
   5., 0.000541466
   6., 0.000896915
   7.,  0.00127311
   8.,  0.00167794
   9.,  0.00212065
  10.,  0.00261183
 10.2,  0.00271691
**
** INTERACTION PROPERTIES
**
*Surface Interaction, name=IntProp_S
1.,
*Friction, slip tolerance=0.005
 0.2,
*Surface Behavior, penalty=NONLINEAR
5800., , , , ,
*Connector Behavior, name=ConnSect_OSB_Joist
*Connector Elasticity, component=1
1836.,
*Connector Plasticity, component=1
*Connector Hardening, definition=TABULAR
 300.,        0.,        0.
 350., 0.0294856,        0.
 400., 0.0601786,        0.
 450., 0.0923462,        0.
 500.,  0.126273,        0.
 550.,   0.16226,        0.
 600.,  0.200624,        0.
 700.,   0.28582,        0.
 800.,  0.384676,        0.
 900.,  0.500216,        0.
1000.,   0.63566,        0.
1100.,  0.794412,        0.
1200.,   1.00357,        0.
1300.,   1.26741,        0.
1400.,   1.58987,        0.
1500.,   1.98129,        0.
1600.,   2.45293,        0.
1700.,   3.01701,        0.
1800.,   3.68666,        0.
1900.,     4.476,        0.
2000.,   5.40011,        0.
2080.,   6.24717,        0.
*Connector Elasticity, component=3
18596.,
*Connector Plasticity, component=3
*Connector Hardening, definition=TABULAR
 700.,         0.,         0.
 750., 0.00285946,         0.
 800., 0.00582594,         0.
 900.,     0.0123,         0.
1000.,  0.0200774,         0.
1100.,  0.0302932,         0.
1200.,  0.0448106,         0.
1300.,  0.0665544,         0.
1400.,  0.0999504,         0.
1500.,   0.151486,         0.
1600.,   0.230419,         0.
1700.,   0.349651,         0.
1800.,   0.526797,         0.
*Connector Behavior, name=ConnSect_Facetrack_Stud
*Connector Elasticity, component=1
 9741.91,
*Connector Plasticity, component=1
*Connector Hardening, definition=TABULAR
 4594.58,      0.,      0.
 6474.71,  3.0652,      0.
 4851.14, 6.24317,      0.
  0.0001,     22.,      0.
*Connector Elasticity, component=3
525.,
*Connector Failure, component=3, release=3
, , , 1837.
** ----------------------------------------------------------------
**
** IMPERFECTIONS: Imperfection_1
**
*Imperfection, input=GSL42015_imperfection.inp
**
** BOUNDARY CONDITIONS
**
** Name: BC_Base_1 Type: Displacement/Rotation
*Boundary
Set_RP_Base_1, 1, 1
Set_RP_Base_1, 2, 2
Set_RP_Base_1, 3, 3
Set_RP_Base_1, 4, 4
Set_RP_Base_1, 5, 5
Set_RP_Base_1, 6, 6
** Name: BC_Joist_End Type: Displacement/Rotation
*Boundary
Set_RP_Joist_End_1, 1, 1
Set_RP_Joist_End_1, 5, 5
Set_RP_Joist_End_1, 6, 6
** Name: BC_Swing_Link Type: Displacement/Rotation
*Boundary
Set_RP_swinglink_top, 1, 1
Set_RP_swinglink_top, 2, 2
Set_RP_swinglink_top, 3, 3
Set_RP_swinglink_top, 5, 5
Set_RP_swinglink_top, 6, 6
**
** INTERACTIONS
**
** Interaction: Int_Facetrack_Stud
*Contact Pair, interaction=IntProp_S, type=SURFACE TO SURFACE
Surf_Stud_Flanges, Facetrack_1.Surf_Middle
** Interaction: Int_Floorsheathing_Joist_1
*Contact Pair, interaction=IntProp_S, type=SURFACE TO SURFACE
Floorsheathing_1.Surf_Bottom_2, Joist_1.Surf_Flange_2
** Interaction: Int_Floorsheathing_Joist_2
*Contact Pair, interaction=IntProp_S, type=SURFACE TO SURFACE
Floorsheathing_1.Surf_Bottom_1, Joist_2.Surf_Flange_1
** Interaction: Int_Gear_Joist_1
*Contact Pair, interaction=IntProp_S, type=SURFACE TO SURFACE
Gear_1_Set_Top_Edge_CNS_, Joist_1.Surf_0
** Interaction: Int_Gear_Joist_2
*Contact Pair, interaction=IntProp_S, type=SURFACE TO SURFACE
Gear_2_Set_Top_Edge_CNS_, Joist_2.Surf_0
** Interaction: Int_Wheel_Gear_1
*Contact Pair, interaction=IntProp_S, type=SURFACE TO SURFACE
Gear_1.Surf_Outside, Wheel_1.Surf_Inside
** Interaction: Int_Wheel_Gear_2
*Contact Pair, interaction=IntProp_S, type=SURFACE TO SURFACE
Gear_2.Surf_Outside, Wheel_2.Surf_Inside
** Interaction: Int_Wheel_Stud_1
*Contact Pair, interaction=IntProp_S, type=SURFACE TO SURFACE
Wheel_1_Set_Top_Edge_CNS_, Stud_1.Surf_Middle
** Interaction: Int_Wheel_Stud_2
*Contact Pair, interaction=IntProp_S, type=SURFACE TO SURFACE
Wheel_2_Set_Top_Edge_CNS_, Stud_2.Surf_Middle
** ----------------------------------------------------------------
**
** STEP: Step_Applied_Gravity
**
*Step, name=Step_Applied_Gravity, nlgeom=YES, inc=100000
*Dynamic,application=QUASI-STATIC,initial=NO
0.075,1.,1e-06
**
** LOADS
**
** Name: Load_Gravity   Type: Gravity
*Dload, amplitude=Amp_1
, GRAV, 9810., 0., -1., 0.
**
** OUTPUT REQUESTS
**
*Restart, write, frequency=0
**
** FIELD OUTPUT: F-Output-1
**
*Output, field, frequency=1
*Node Output
U,
*Element Output, directions=YES
PEEQ, S
**
** HISTORY OUTPUT: H_Output_Joist_End
**
*Output, history, frequency=1
*Node Output, nset=Set_RP_swinglink_top
RF2, U2
*End Step
** ----------------------------------------------------------------
**
** STEP: Step_Load
**
*Step, name=Step_Load, nlgeom=YES, inc=100000
*Dynamic,application=QUASI-STATIC,initial=NO
0.1,22.,1e-06,0.2
**
** BOUNDARY CONDITIONS
**
** Name: BC_Swing_Link Type: Displacement/Rotation
*Boundary, amplitude=Amp_Cyclic_Loads
Set_RP_swinglink_top, 1, 1
Set_RP_swinglink_top, 2, 2, 1.
Set_RP_swinglink_top, 3, 3
Set_RP_swinglink_top, 5, 5
Set_RP_swinglink_top, 6, 6
**
** OUTPUT REQUESTS
**
*Restart, write, frequency=0
**
** FIELD OUTPUT: F-Output-1
**
*Output, field, frequency=1
*Node Output
U,
*Element Output, directions=YES
PEEQ, S
**
** HISTORY OUTPUT: H_Output_Joist_End
**
*Output, history, frequency=1
*Node Output, nset=Set_RP_swinglink_top
RF2, U2
*End Step
