*Heading
** Job name: KSW42033 Model name: KSW42033
** Generated by: Abaqus/CAE 2024
*Preprint, echo=NO, model=NO, history=NO, contact=NO
**
** PARTS
**
*Part, name=Facetrack
*Node
      1,          35.,         -77.,         525.
      2,         -35.,         -77.,         525.
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*Element, type=S4R
  1,   1,  17, 353, 116
  2,  17,  18, 354, 353
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*Nset, nset=Set_Whole, generate
    1,  1860,     1
*Elset, elset=Set_Whole, generate
    1,  1769,     1
*Elset, elset=_Surf_0_SPOS, internal, generate
 1594,  1713,     1
*Surface, type=ELEMENT, name=Surf_0
_Surf_0_SPOS, SPOS
*Elset, elset=_Surf_1_SPOS, internal, generate
 1362,  1481,     1
*Surface, type=ELEMENT, name=Surf_1
_Surf_1_SPOS, SPOS
*Elset, elset=_Surf_Middle_SPOS, internal
  316,  317,  318,  319,  320,  321
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*Surface, type=ELEMENT, name=Surf_Middle
_Surf_Middle_SPOS, SPOS
** Section: Sec_Facetrack
*Shell Section, elset=Set_Whole, material=Mat_CFS_Facetrack, offset=SPOS
1.2, 7
*End Part
**
*Part, name=Gear
*Node
      1,   21.5606232,   52.0519485,          30.
      2,   17.0622635,   41.1919479,          30.
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*Element, type=S4R
  1,    1,   65, 1817,  144
  2,   65,   66, 1818, 1817
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*Nset, nset=Set_Bottom_Edge
    3,    4,    6,    8,   10,   12
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*Elset, elset=Set_Bottom_Edge
   349,   350,   351,   352,   353,   354
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*Nset, nset=Set_Top_Edge
    1,    2,    5,    7,    9,   11
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*Elset, elset=Set_Top_Edge
     1,     2,     3,     4,     5,     6
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*Nset, nset=Set_Whole, generate
     1,  13764,      1
*Elset, elset=Set_Whole, generate
     1,  13320,      1
*Elset, elset=_Surf_Outside_SPOS, internal, generate
     1,  13320,      1
*Surface, type=ELEMENT, name=Surf_Outside
_Surf_Outside_SPOS, SPOS
** Section: Sec_Gear
*Shell Section, elset=Set_Whole, material=Mat_WAAM_n, offset=SPOS
3.3, 7
*End Part
**
*Part, name=Joist
*Node
      1,         37.5,        -105.,        1250.
      2,         37.5,        -120.,        1250.
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*Element, type=S4R
  1,    1,   57, 1417,  276
  2,   57,    2,   58, 1417
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*Element, type=S3
5581,  6317,  6329,  6318
5582,  6327,  6326,  6337
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*Nset, nset=Set_Top_Edge
  13,  14,  15,  16,  17,  20
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*Elset, elset=Set_Top_Edge
 4859, 4860, 4933, 4934, 4935, 4936
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*Nset, nset=Set_Bottom_Edge
   18,   19,   21,   22,   23,   24
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*Elset, elset=Set_Bottom_Edge
 5289, 5290, 5423, 5424, 5425, 5426
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*Nset, nset=Set_Load_Edge
   1,   2,   5,   7,   9,  11
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*Elset, elset=Set_Load_Edge
    1,    2,  221,  222,  223,  224
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*Nset, nset=Set_Node_Corner_1
 18,
*Nset, nset=Set_Node_Corner_2
 22,
*Nset, nset=Set_TopSurf
    1,    2,    3,    4,    5,    6
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*Elset, elset=Set_TopSurf
    1,    2,    3,    4,    5,    6
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*Nset, nset=Set_MidSurf
     5,     6,     7,     8,    15,    16
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*Elset, elset=Set_MidSurf
 1101, 1102, 1103, 1104, 1105, 1106
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*Nset, nset=Set_Wheel_Edge
   25,   26,   27,   28,   29,   30
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*Elset, elset=Set_Wheel_Edge
 5605, 5606, 5727, 5756, 5757, 5758
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*Elset, elset=_Surf_0_SPOS, internal, generate
 5581,  9866,     1
*Surface, type=ELEMENT, name=Surf_0
_Surf_0_SPOS, SPOS
*Elset, elset=_Surf_Flange_1_SPOS, internal
  221,  222,  223,  224,  225,  226
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*Surface, type=ELEMENT, name=Surf_Flange_1
_Surf_Flange_1_SPOS, SPOS
*Elset, elset=_Surf_Flange_2_SPOS, internal
 3741, 3742, 3743, 3744, 3745, 3746
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*Surface, type=ELEMENT, name=Surf_Flange_2
_Surf_Flange_2_SPOS, SPOS
*Elset, elset=_Surf_1_SNEG, internal
 3694, 3695, 3696, 3697, 3698, 3699
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*Surface, type=ELEMENT, name=Surf_1
_Surf_1_SNEG, SNEG
** Section: Sec_Joist
*Shell Section, elset=Set_TopSurf, material=Mat_CFS_Joist, offset=SPOS
1.3, 7
** Section: Sec_Joist
*Shell Section, elset=Set_MidSurf, material=Mat_CFS_Joist, offset=SNEG
1.3, 7
*End Part
**
*Part, name=Stud
*Node
      1,         37.5,         -60.,         820.
      2,         37.5,         -75.,         820.
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*Element, type=S4R
 1,   1,  25, 625,  72
 2,  25,   2,  26, 625
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*Nset, nset=Set_Bottom_Edge
  18,  19,  21,  22,  23,  24
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*Elset, elset=Set_Bottom_Edge
  988,  989, 1448, 1449, 1450, 1451
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*Nset, nset=Set_Top_Edge
  13,  14,  15,  16,  17,  20
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*Elset, elset=Set_Top_Edge
 841, 842, 843, 844, 845, 846
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*Nset, nset=Set_Whole, generate
    1,  3024,     1
*Elset, elset=Set_Whole, generate
    1,  2905,     1
*Elset, elset=_Surf_Middle_SPOS, internal, generate
 241,  600,    1
*Surface, type=ELEMENT, name=Surf_Middle
_Surf_Middle_SPOS, SPOS
*Elset, elset=_Surf_Flange_1_SPOS, internal, generate
  49,  240,    1
*Surface, type=ELEMENT, name=Surf_Flange_1
_Surf_Flange_1_SPOS, SPOS
*Elset, elset=_Surf_Flange_2_SPOS, internal, generate
 601,  792,    1
*Surface, type=ELEMENT, name=Surf_Flange_2
_Surf_Flange_2_SPOS, SPOS
** Section: Sec_Stud
*Shell Section, elset=Set_Whole, material=Mat_CFS_Stud, offset=SPOS
1.39, 7
*End Part
**
**
** ASSEMBLY
**
*Assembly, name=Assembly
**
*Instance, name=Stud_1, part=Stud
      -262.5,           0.,           0.
      -262.5,           0.,           0.,       -262.5, 0.707106790158355, 0.707106790158355,         180.
*End Instance
**
*Instance, name=Stud_2, part=Stud
       262.5,           0.,           0.
       262.5,           0.,           0., 261.499999987312,           0.,           0., 89.9999992730282
*End Instance
**
*Instance, name=Joist_1, part=Joist
      -186.2,         700.,         -75.
*End Instance
**
*Instance, name=Joist_2, part=Joist
       186.2,         700.,         -75.
       186.2,         700.,         -75.,        186.2,         700.,         -74.,         180.
*End Instance
**
*Instance, name=Facetrack_1, part=Facetrack
       -300.,         743.,        -110.
       -300.,         743.,        -110.,        -300., 744.000000012688,        -110., 89.9999992730282
*End Instance
**
*Instance, name=Gear_1, part=Gear
       -225.,         700.,           0.
       -225.,         700.,           0.,        -225., 701.000000012688,           0., 89.9999992730282
*End Instance
**
*Instance, name=Gear_2, part=Gear
        225.,         700.,           0.
        225.,         700.,           0., 224.292893209842,         700., 0.707106790158355,         180.
*End Instance
**
*Node
      1,           0.,           0.,           0.
*Node
      2,           0.,         700.,        1175.
*Node
      3,           0.,         810.,        1175.
*Node
      4,        262.5,         795.,         -75.
      5,        262.5,         691.,         -75.
      6,       -262.5,         795.,         -75.
      7,       -262.5,         691.,         -75.
*Element, type=CONN3D2
1, 3, 2
*Connector Section, elset=Wire_Swing_Link, behavior=ConnSect_Swing_Link
Axial,
Datum_csys_Swing_Link,
*Nset, nset=AttachmentPoints_Facetrack_Stud_1
 6, 7
*Nset, nset=AttachmentPoints_Facetrack_Stud_2
 4, 5
*Nset, nset=Joist_Top_Edge_1, instance=Joist_1
   1,   2,   5,   7,   9,  11
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*Nset, nset=Joist_Top_Edge_1, instance=Joist_2
   1,   2,   5,   7,   9,  11
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*Elset, elset=Joist_Top_Edge_1, instance=Joist_1
    1,    2,  221,  222,  223,  224
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*Elset, elset=Joist_Top_Edge_1, instance=Joist_2
    1,    2,  221,  222,  223,  224
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*Nset, nset=Set_RP_Base_1
 1,
*Nset, nset=Set_RP_Joist_End_1
 2,
*Nset, nset=Set_RP_swinglink_top
 3,
*Nset, nset=Stud_Bottom_Edge_1, instance=Stud_1
  18,  19,  21,  22,  23,  24
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*Nset, nset=Stud_Bottom_Edge_1, instance=Stud_2
  18,  19,  21,  22,  23,  24
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*Elset, elset=Stud_Bottom_Edge_1, instance=Stud_1
  988,  989, 1448, 1449, 1450, 1451
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*Elset, elset=Stud_Bottom_Edge_1, instance=Stud_2
  988,  989, 1448, 1449, 1450, 1451
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*Nset, nset=Wire_Swing_Link
 2, 3
*Elset, elset=Wire_Swing_Link
 1,
*Elset, elset=_Surf_Stud_Flanges_SPOS, internal, instance=Stud_1, generate
  49,  240,    1
*Elset, elset=_Surf_Stud_Flanges_SPOS, internal, instance=Stud_2, generate
 601,  792,    1
*Surface, type=ELEMENT, name=Surf_Stud_Flanges
_Surf_Stud_Flanges_SPOS, SPOS
*Surface, type=NODE, name=Joist_1_Set_Wheel_Edge_CNS_, internal
Joist_1.Set_Wheel_Edge, 1.
*Surface, type=NODE, name=Joist_2_Set_Wheel_Edge_CNS_, internal
Joist_2.Set_Wheel_Edge, 1.
*Surface, type=NODE, name=Stud_Bottom_Edge_1_CNS_, internal
Stud_Bottom_Edge_1, 1.
*Surface, type=NODE, name=Joist_Top_Edge_1_CNS_, internal
Joist_Top_Edge_1, 1.
*Surface, type=NODE, name=Gear_1_Set_Bottom_Edge_CNS_, internal
Gear_1.Set_Bottom_Edge, 1.
*Surface, type=NODE, name=Gear_2_Set_Bottom_Edge_CNS_, internal
Gear_2.Set_Bottom_Edge, 1.
*Orientation, name=Datum_csys_Swing_Link
          0.,           1.,           0.,          -1.,           0.,           0.
1, 0.
*Orientation, name=Datum_csys_Glob
          1.,           0.,           0.,           0.,           1.,           0.
1, 0.
*Orientation, name=Datum_csys_Facetrack
          1.,           0.,           0.,           0.,           1.,           0.
1, 0.
** Constraint: Coupling_Base_1
*Coupling, constraint name=Coupling_Base_1, ref node=Set_RP_Base_1, surface=Stud_Bottom_Edge_1_CNS_
*Kinematic
** Constraint: Joist_End_1
*Coupling, constraint name=Joist_End_1, ref node=Set_RP_Joist_End_1, surface=Joist_Top_Edge_1_CNS_
*Kinematic
** Constraint: Tie_Gear_1
*Tie, name=Tie_Gear_1, adjust=yes
Gear_1_Set_Bottom_Edge_CNS_, Stud_1.Surf_Middle
** Constraint: Tie_Gear_2
*Tie, name=Tie_Gear_2, adjust=yes
Gear_2_Set_Bottom_Edge_CNS_, Stud_2.Surf_Middle
*Elset, elset=__Int_KW_1_msm_2_SPOS, internal, instance=Gear_1, generate
 361,  480,    1
*Surface, type=ELEMENT, name=_Int_KW_1_msm_2, internal
__Int_KW_1_msm_2_SPOS, SPOS
*Elset, elset=__Int_KW_1_msm_4_SPOS, internal, instance=Gear_1, generate
 1351,  1470,     1
*Surface, type=ELEMENT, name=_Int_KW_1_msm_4, internal
__Int_KW_1_msm_4_SPOS, SPOS
*Elset, elset=__Int_KW_1_msm_6_SPOS, internal, instance=Gear_1, generate
 1831,  2010,     1
*Surface, type=ELEMENT, name=_Int_KW_1_msm_6, internal
__Int_KW_1_msm_6_SPOS, SPOS
*Elset, elset=__Int_KW_1_msm_8_SPOS, internal, instance=Gear_1, generate
 3151,  3330,     1
*Surface, type=ELEMENT, name=_Int_KW_1_msm_8, internal
__Int_KW_1_msm_8_SPOS, SPOS
*Elset, elset=__Int_KW_1_msm_10_SPOS, internal, instance=Gear_1, generate
 3691,  3810,     1
*Surface, type=ELEMENT, name=_Int_KW_1_msm_10, internal
__Int_KW_1_msm_10_SPOS, SPOS
*Elset, elset=__Int_KW_1_msm_12_SPOS, internal, instance=Gear_1, generate
 4681,  4800,     1
*Surface, type=ELEMENT, name=_Int_KW_1_msm_12, internal
__Int_KW_1_msm_12_SPOS, SPOS
*Elset, elset=__Int_KW_1_msm_14_SPOS, internal, instance=Gear_1, generate
 5161,  5340,     1
*Surface, type=ELEMENT, name=_Int_KW_1_msm_14, internal
__Int_KW_1_msm_14_SPOS, SPOS
*Elset, elset=__Int_KW_1_msm_16_SPOS, internal, instance=Gear_1, generate
 6481,  6660,     1
*Surface, type=ELEMENT, name=_Int_KW_1_msm_16, internal
__Int_KW_1_msm_16_SPOS, SPOS
*Elset, elset=__Int_KW_1_msm_18_SPOS, internal, instance=Gear_1, generate
 7021,  7140,     1
*Surface, type=ELEMENT, name=_Int_KW_1_msm_18, internal
__Int_KW_1_msm_18_SPOS, SPOS
*Elset, elset=__Int_KW_1_msm_20_SPOS, internal, instance=Gear_1, generate
 8011,  8130,     1
*Surface, type=ELEMENT, name=_Int_KW_1_msm_20, internal
__Int_KW_1_msm_20_SPOS, SPOS
*Elset, elset=__Int_KW_1_msm_22_SPOS, internal, instance=Gear_1, generate
 8491,  8670,     1
*Surface, type=ELEMENT, name=_Int_KW_1_msm_22, internal
__Int_KW_1_msm_22_SPOS, SPOS
*Elset, elset=__Int_KW_1_msm_24_SPOS, internal, instance=Gear_1, generate
 9811,  9990,     1
*Surface, type=ELEMENT, name=_Int_KW_1_msm_24, internal
__Int_KW_1_msm_24_SPOS, SPOS
*Elset, elset=__Int_KW_1_msm_26_SPOS, internal, instance=Gear_1, generate
 10351,  10470,      1
*Surface, type=ELEMENT, name=_Int_KW_1_msm_26, internal
__Int_KW_1_msm_26_SPOS, SPOS
*Elset, elset=__Int_KW_1_msm_28_SPOS, internal, instance=Gear_1, generate
 11341,  11460,      1
*Surface, type=ELEMENT, name=_Int_KW_1_msm_28, internal
__Int_KW_1_msm_28_SPOS, SPOS
*Elset, elset=__Int_KW_1_msm_30_SPOS, internal, instance=Gear_1, generate
 11821,  12000,      1
*Surface, type=ELEMENT, name=_Int_KW_1_msm_30, internal
__Int_KW_1_msm_30_SPOS, SPOS
*Elset, elset=__Int_KW_1_msm_32_SPOS, internal, instance=Gear_1, generate
 13141,  13320,      1
*Surface, type=ELEMENT, name=_Int_KW_1_msm_32, internal
__Int_KW_1_msm_32_SPOS, SPOS
*Elset, elset=__Int_KW_2_msm_2_SPOS, internal, instance=Gear_2, generate
 361,  480,    1
*Surface, type=ELEMENT, name=_Int_KW_2_msm_2, internal
__Int_KW_2_msm_2_SPOS, SPOS
*Elset, elset=__Int_KW_2_msm_4_SPOS, internal, instance=Gear_2, generate
 1351,  1470,     1
*Surface, type=ELEMENT, name=_Int_KW_2_msm_4, internal
__Int_KW_2_msm_4_SPOS, SPOS
*Elset, elset=__Int_KW_2_msm_6_SPOS, internal, instance=Gear_2, generate
 1831,  2010,     1
*Surface, type=ELEMENT, name=_Int_KW_2_msm_6, internal
__Int_KW_2_msm_6_SPOS, SPOS
*Elset, elset=__Int_KW_2_msm_8_SPOS, internal, instance=Gear_2, generate
 3151,  3330,     1
*Surface, type=ELEMENT, name=_Int_KW_2_msm_8, internal
__Int_KW_2_msm_8_SPOS, SPOS
*Elset, elset=__Int_KW_2_msm_10_SPOS, internal, instance=Gear_2, generate
 3691,  3810,     1
*Surface, type=ELEMENT, name=_Int_KW_2_msm_10, internal
__Int_KW_2_msm_10_SPOS, SPOS
*Elset, elset=__Int_KW_2_msm_12_SPOS, internal, instance=Gear_2, generate
 4681,  4800,     1
*Surface, type=ELEMENT, name=_Int_KW_2_msm_12, internal
__Int_KW_2_msm_12_SPOS, SPOS
*Elset, elset=__Int_KW_2_msm_14_SPOS, internal, instance=Gear_2, generate
 5161,  5340,     1
*Surface, type=ELEMENT, name=_Int_KW_2_msm_14, internal
__Int_KW_2_msm_14_SPOS, SPOS
*Elset, elset=__Int_KW_2_msm_16_SPOS, internal, instance=Gear_2, generate
 6481,  6660,     1
*Surface, type=ELEMENT, name=_Int_KW_2_msm_16, internal
__Int_KW_2_msm_16_SPOS, SPOS
*Elset, elset=__Int_KW_2_msm_18_SPOS, internal, instance=Gear_2, generate
 7021,  7140,     1
*Surface, type=ELEMENT, name=_Int_KW_2_msm_18, internal
__Int_KW_2_msm_18_SPOS, SPOS
*Elset, elset=__Int_KW_2_msm_20_SPOS, internal, instance=Gear_2, generate
 8011,  8130,     1
*Surface, type=ELEMENT, name=_Int_KW_2_msm_20, internal
__Int_KW_2_msm_20_SPOS, SPOS
*Elset, elset=__Int_KW_2_msm_22_SPOS, internal, instance=Gear_2, generate
 8491,  8670,     1
*Surface, type=ELEMENT, name=_Int_KW_2_msm_22, internal
__Int_KW_2_msm_22_SPOS, SPOS
*Elset, elset=__Int_KW_2_msm_24_SPOS, internal, instance=Gear_2, generate
 9811,  9990,     1
*Surface, type=ELEMENT, name=_Int_KW_2_msm_24, internal
__Int_KW_2_msm_24_SPOS, SPOS
*Elset, elset=__Int_KW_2_msm_26_SPOS, internal, instance=Gear_2, generate
 10351,  10470,      1
*Surface, type=ELEMENT, name=_Int_KW_2_msm_26, internal
__Int_KW_2_msm_26_SPOS, SPOS
*Elset, elset=__Int_KW_2_msm_28_SPOS, internal, instance=Gear_2, generate
 11341,  11460,      1
*Surface, type=ELEMENT, name=_Int_KW_2_msm_28, internal
__Int_KW_2_msm_28_SPOS, SPOS
*Elset, elset=__Int_KW_2_msm_30_SPOS, internal, instance=Gear_2, generate
 11821,  12000,      1
*Surface, type=ELEMENT, name=_Int_KW_2_msm_30, internal
__Int_KW_2_msm_30_SPOS, SPOS
*Elset, elset=__Int_KW_2_msm_32_SPOS, internal, instance=Gear_2, generate
 13141,  13320,      1
*Surface, type=ELEMENT, name=_Int_KW_2_msm_32, internal
__Int_KW_2_msm_32_SPOS, SPOS
**
** POINT-BASED FASTENER: Fasteners_Stud_Facetrack_1
*Fastener Property, name=Fasteners_Stud_Facetrack_1
2.7
*Connector Section, elset=_Fasteners_Stud_Facetrack_1_pf_, behavior=ConnSect_Facetrack_Stud
Radial-Thrust,
Datum_csys_Glob,
*Fastener, interaction name=Fasteners_Stud_Facetrack_1, property=Fasteners_Stud_Facetrack_1, reference node set=AttachmentPoints_Facetrack_Stud_2, elset=_Fasteners_Stud_Facetrack_1_pf_, coupling=STRUCTURAL, attachment method=FACETOFACE,
weighting method=UNIFORM, adjust orientation=NO, number of layers=1, orientation=Datum_csys_Facetrack

Stud_1.Surf_Flange_1, Facetrack_1.Surf_0
**
** POINT-BASED FASTENER: Fasteners_Stud_Facetrack_2
*Fastener Property, name=Fasteners_Stud_Facetrack_2
2.7
*Connector Section, elset=_Fasteners_Stud_Facetrack_2_pf_, behavior=ConnSect_Facetrack_Stud
Radial-Thrust,
Datum_csys_Glob,
*Fastener, interaction name=Fasteners_Stud_Facetrack_2, property=Fasteners_Stud_Facetrack_2, reference node set=AttachmentPoints_Facetrack_Stud_2, elset=_Fasteners_Stud_Facetrack_2_pf_, coupling=STRUCTURAL, attachment method=FACETOFACE,
weighting method=UNIFORM, adjust orientation=NO, number of layers=1, orientation=Datum_csys_Facetrack

Stud_2.Surf_Flange_2, Facetrack_1.Surf_1
*End Assembly
*Connector Behavior, name=ConnSect_Swing_Link
*Connector Elasticity, component=1
 217.636,
*Amplitude, name=Amp_1, definition=SMOOTH STEP
             0.,              0.,              1.,              1.
*Amplitude, name=Amp_Cyclic_Loads, definition=SMOOTH STEP
             0.,              0.,            0.25,             3.6,             0.5,              0.,            0.75,            -3.6
             1.,              0.,            1.25,             3.6,             1.5,              0.,            1.75,            -3.6
             2.,              0.,            2.25,             5.1,             2.5,              0.,            2.75,            -5.1
             3.,              0.,            3.25,             5.1,             3.5,              0.,            3.75,            -5.1
             4.,              0.,            4.25,            7.13,             4.5,              0.,            4.75,           -7.13
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            22.,              0.
**
** MATERIALS
**
*Material, name=Mat_CFS_Facetrack
*Density
 7.85e-09,
*Elastic
210000., 0.33
*Plastic, hardening=COMBINED, number backstresses=1
  165.13,         0.
  200.19,   2.79e-06
  230.25,  1.031e-05
   250.3,  2.073e-05
  275.37,  4.463e-05
  305.47, 0.00010054
 350.687, 0.00029092
 365.783, 0.00040134
 401.089, 0.00080816
 441.664, 0.00167089
 483.264, 0.00447584
 501.308,  0.0102762
 523.592,  0.0238094
 553.175,  0.0496411
    594.,  0.0924816
*Material, name=Mat_CFS_Joist
*Density
 7.85e-09,
*Elastic
206486., 0.33
*Plastic, hardening=COMBINED, number backstresses=1
 180.859,          0.
 216.513, 1.49257e-05
 250.794, 4.32228e-05
 282.796, 7.23491e-05
 310.947, 9.92667e-05
 337.464, 0.000127139
  363.68, 0.000152197
 388.874, 0.000193237
 411.313, 0.000244784
 428.084, 0.000277835
 440.332,  0.00428554
 450.629,   0.0163549
 460.569,   0.0177997
 470.063,   0.0212219
 480.869,   0.0250334
 490.266,   0.0288936
 500.037,   0.0334542
 510.624,   0.0383959
 520.303,   0.0440849
 530.149,   0.0505497
 540.413,   0.0581536
 550.797,   0.0669834
 560.093,   0.0770992
 570.054,   0.0885199
 580.015,    0.102849
 590.532,    0.119555
 600.077,    0.140471
 603.529,     0.15224
*Material, name=Mat_CFS_Stud
*Density
 7.85e-09,
*Elastic
188001., 0.33
*Plastic, hardening=COMBINED, number backstresses=1
 132.063,          0.
 168.111, 7.67942e-06
 200.596, 1.43884e-05
  229.07, 2.50399e-05
 258.817, 5.06657e-05
 286.184, 0.000112781
 306.404, 0.000166827
 327.565, 0.000235869
 344.781,  0.00033777
 360.941, 0.000461995
 374.581, 0.000623634
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 636.262,     0.16889
*Material, name=Mat_WAAM_n
*Density
 7.85e-09,
*Elastic
204000., 0.33
*Plastic, hardening=COMBINED, number backstresses=1
  386.73,      0.
 392.415, 0.00466
 398.136,  0.0093
 403.893,  0.0139
 409.686,  0.0185
 411.576,  0.0231
 430.308,  0.0322
 448.491,  0.0412
 465.488,  0.0502
 480.964,   0.059
 494.857,  0.0678
 507.286,  0.0765
 518.452,  0.0852
 528.575,  0.0938
 537.857,   0.102
 546.469,   0.111
 554.552,   0.119
 562.215,   0.127
 569.547,   0.136
 576.615,   0.144
**
** INTERACTION PROPERTIES
**
*Surface Interaction, name=IntProp_S
1.,
*Friction, slip tolerance=0.005
 0.2,
*Surface Behavior, penalty=NONLINEAR
5800., , , , ,
*Surface Smoothing, name=Int_KW_1
, _Int_KW_1_msm_2, CIRCUMFERENTIAL, -225., 740.044, -19.8339, -224., 740.044, -19.8339
, _Int_KW_1_msm_4, CIRCUMFERENTIAL, -225., 719.834, -40.0439, -224., 719.834, -40.0439
, _Int_KW_1_msm_6, CIRCUMFERENTIAL, -225., 718.789, -53.2, -224., 718.789, -53.2
, _Int_KW_1_msm_8, CIRCUMFERENTIAL, -225., 681.211, -53.2, -224., 681.211, -53.2
, _Int_KW_1_msm_10, CIRCUMFERENTIAL, -225., 680.166, -40.0439, -224., 680.166, -40.0439
, _Int_KW_1_msm_12, CIRCUMFERENTIAL, -225., 659.956, -19.8339, -224., 659.956, -19.8339
, _Int_KW_1_msm_14, CIRCUMFERENTIAL, -225., 646.8, -18.789, -224., 646.8, -18.789
, _Int_KW_1_msm_16, CIRCUMFERENTIAL, -225., 646.8, 18.789, -224., 646.8, 18.789
, _Int_KW_1_msm_18, CIRCUMFERENTIAL, -225., 659.956, 19.8339, -224., 659.956, 19.8339
, _Int_KW_1_msm_20, CIRCUMFERENTIAL, -225., 680.166, 40.0439, -224., 680.166, 40.0439
, _Int_KW_1_msm_22, CIRCUMFERENTIAL, -225., 681.211, 53.2, -224., 681.211, 53.2
, _Int_KW_1_msm_24, CIRCUMFERENTIAL, -225., 718.789, 53.2, -224., 718.789, 53.2
, _Int_KW_1_msm_26, CIRCUMFERENTIAL, -225., 719.834, 40.0439, -224., 719.834, 40.0439
, _Int_KW_1_msm_28, CIRCUMFERENTIAL, -225., 740.044, 19.8339, -224., 740.044, 19.8339
, _Int_KW_1_msm_30, CIRCUMFERENTIAL, -225., 753.2, 18.789, -224., 753.2, 18.789
, _Int_KW_1_msm_32, CIRCUMFERENTIAL, -225., 753.2, -18.789, -224., 753.2, -18.789
*Surface Smoothing, name=Int_KW_2
, _Int_KW_2_msm_2, CIRCUMFERENTIAL, 225., 659.956, -19.8339, 224., 659.956, -19.8339
, _Int_KW_2_msm_4, CIRCUMFERENTIAL, 225., 680.166, -40.0439, 224., 680.166, -40.0439
, _Int_KW_2_msm_6, CIRCUMFERENTIAL, 225., 681.211, -53.2, 224., 681.211, -53.2
, _Int_KW_2_msm_8, CIRCUMFERENTIAL, 225., 718.789, -53.2, 224., 718.789, -53.2
, _Int_KW_2_msm_10, CIRCUMFERENTIAL, 225., 719.834, -40.0439, 224., 719.834, -40.0439
, _Int_KW_2_msm_12, CIRCUMFERENTIAL, 225., 740.044, -19.8339, 224., 740.044, -19.8339
, _Int_KW_2_msm_14, CIRCUMFERENTIAL, 225., 753.2, -18.789, 224., 753.2, -18.789
, _Int_KW_2_msm_16, CIRCUMFERENTIAL, 225., 753.2, 18.789, 224., 753.2, 18.789
, _Int_KW_2_msm_18, CIRCUMFERENTIAL, 225., 740.044, 19.8339, 224., 740.044, 19.8339
, _Int_KW_2_msm_20, CIRCUMFERENTIAL, 225., 719.834, 40.0439, 224., 719.834, 40.0439
, _Int_KW_2_msm_22, CIRCUMFERENTIAL, 225., 718.789, 53.2, 224., 718.789, 53.2
, _Int_KW_2_msm_24, CIRCUMFERENTIAL, 225., 681.211, 53.2, 224., 681.211, 53.2
, _Int_KW_2_msm_26, CIRCUMFERENTIAL, 225., 680.166, 40.0439, 224., 680.166, 40.0439
, _Int_KW_2_msm_28, CIRCUMFERENTIAL, 225., 659.956, 19.8339, 224., 659.956, 19.8339
, _Int_KW_2_msm_30, CIRCUMFERENTIAL, 225., 646.8, 18.789, 224., 646.8, 18.789
, _Int_KW_2_msm_32, CIRCUMFERENTIAL, 225., 646.8, -18.789, 224., 646.8, -18.789
*Connector Behavior, name=ConnSect_Facetrack_Stud
*Connector Elasticity, component=1
 9741.91,
*Connector Plasticity, component=1
*Connector Hardening, definition=TABULAR
 4594.58,      0.,      0.
 6474.71,  3.0652,      0.
 4851.14, 6.24317,      0.
  0.0001,     22.,      0.
*Connector Elasticity, component=3
525.,
*Connector Failure, component=3, release=3
, , , 1837.
** ----------------------------------------------------------------
**
** IMPERFECTIONS: Imperfection_1
**
*Imperfection, input=KSW42033_imperfection.inp
**
** BOUNDARY CONDITIONS
**
** Name: BC_Base_1 Type: Displacement/Rotation
*Boundary
Set_RP_Base_1, 1, 1
Set_RP_Base_1, 2, 2
Set_RP_Base_1, 3, 3
Set_RP_Base_1, 4, 4
Set_RP_Base_1, 5, 5
Set_RP_Base_1, 6, 6
** Name: BC_Joist_End Type: Displacement/Rotation
*Boundary
Set_RP_Joist_End_1, 1, 1
Set_RP_Joist_End_1, 5, 5
Set_RP_Joist_End_1, 6, 6
** Name: BC_Swing_Link Type: Displacement/Rotation
*Boundary
Set_RP_swinglink_top, 1, 1
Set_RP_swinglink_top, 2, 2
Set_RP_swinglink_top, 3, 3
Set_RP_swinglink_top, 5, 5
Set_RP_swinglink_top, 6, 6
**
** INTERACTIONS
**
** Interaction: Int_Facetrack_Stud
*Contact Pair, interaction=IntProp_S, type=SURFACE TO SURFACE
Surf_Stud_Flanges, Facetrack_1.Surf_Middle
** Interaction: Int_Joist_Stud_1
*Contact Pair, interaction=IntProp_S
Joist_1.Surf_0, Stud_1.Surf_Middle
** Interaction: Int_Joist_Stud_2
*Contact Pair, interaction=IntProp_S
Joist_2.Surf_0, Stud_2.Surf_Middle
** Interaction: Int_KW_1
*Contact Pair, interaction=IntProp_S, type=SURFACE TO SURFACE, geometric correction=Int_KW_1
Joist_1_Set_Wheel_Edge_CNS_, Gear_1.Surf_Outside
** Interaction: Int_KW_2
*Contact Pair, interaction=IntProp_S, type=SURFACE TO SURFACE, geometric correction=Int_KW_2
Joist_2_Set_Wheel_Edge_CNS_, Gear_2.Surf_Outside
** ----------------------------------------------------------------
**
** STEP: Step_Applied_Gravity
**
*Step, name=Step_Applied_Gravity, nlgeom=YES, inc=100000
*Dynamic,application=QUASI-STATIC,initial=NO
0.2,1.,1e-06
**
** LOADS
**
** Name: Load_Gravity   Type: Gravity
*Dload, amplitude=Amp_1
, GRAV, 9810., 0., -1., 0.
**
** OUTPUT REQUESTS
**
*Restart, write, frequency=0
**
** FIELD OUTPUT: F-Output-1
**
*Output, field, frequency=1
*Node Output
U,
*Element Output, directions=YES
PEEQ, S
**
** HISTORY OUTPUT: H_Output_Joist_End
**
*Output, history, frequency=1
*Node Output, nset=Set_RP_swinglink_top
RF2, U2
*End Step
** ----------------------------------------------------------------
**
** STEP: Step_Load
**
*Step, name=Step_Load, nlgeom=YES, inc=100000
*Dynamic,application=QUASI-STATIC,initial=NO
0.15,22.,1e-06,0.2
**
** BOUNDARY CONDITIONS
**
** Name: BC_Swing_Link Type: Displacement/Rotation
*Boundary, amplitude=Amp_Cyclic_Loads
Set_RP_swinglink_top, 1, 1
Set_RP_swinglink_top, 2, 2, 1.
Set_RP_swinglink_top, 3, 3
Set_RP_swinglink_top, 5, 5
Set_RP_swinglink_top, 6, 6
**
** OUTPUT REQUESTS
**
*Restart, write, frequency=0
**
** FIELD OUTPUT: F-Output-1
**
*Output, field, frequency=1
*Node Output
U,
*Element Output, directions=YES
PEEQ, S
**
** HISTORY OUTPUT: H_Output_Joist_End
**
*Output, history, frequency=1
*Node Output, nset=Set_RP_swinglink_top
RF2, U2
*End Step
